// COMSOL Multiphysics 6.0.0.312 model "bar3.mph"
// Outline of the model tree

Parameters
  k_fluid = 0.6[W/(m*K)]
  Cp_fluid = 4186[J/(kg*K)]
  rho_fluid = 1000[kg/m^3]
  k_matrix = 3[W/(m*K)]
  Cp_matrix = 860[J/(kg*K)]
  rho_matrix = 2800[kg/m^3]
  porosity = 0.3
  k_effective = (1-porosity)*k_matrix+porosity*k_fluid
  C_effective = (1-porosity)*rho_matrix*Cp_matrix+porosity*rho_fluid*Cp_fluid
  velocity = 0[um/s]
  C_fluid = rho_fluid*Cp_fluid

Functions
  step1: Step

Geometry
  geom1 "Geometry 1" (3D, length unit m)
    blk1: Block | size = {20, 1, 1}
    fin: Finalize "Form Union"

Physics
  c: CoefficientFormPDE on all domains
    dependent variable T
    ShapeProperty.order = 1
    ShapeProperty.boundaryFluxSmooth = 1
    ShapeProperty.valueType = real
    Units.DependentVariableQuantity = temperature
    Units.CustomDependentVariableUnit = K
    Units.SourceTermQuantity = powerdensity
    Units.CustomSourceTermUnit = W/m^3
    cfeq1: CoefficientFormPDE (default) | c = k_effective; f = 0; da = C_effective; be = {C_fluid*velocity, 0, 0}
    zflx1: ZeroFluxBoundary "Zero Flux 1" (default)
    init1: init "Initial Values 1" (default) | T = 293.15[K]
    dir1: DirichletBoundary "Dirichlet Boundary Condition 1" on boundaries 1 | r = 293.15[K]+10[K]*step1(t[1/d])

Mesh
  mesh1 "Mesh 1"
    ftri1: FreeTri "Free Triangular 1" on boundaries 1
      size1: Size on boundaries 1
    swe1: Sweep "Swept 1" on remaining entities
      dis1: Distribution on domains 1 | type = predefined; elemcount = 1000; elemratio = 100; growthrate = exponential

Studies
  std1 "Study 1"
    time: Transient "Time Dependent" | tunit = d; tlist = range(0,1,100)

Solver configurations
  sol1 "Solution 1" (study std1)
    v1: Variables "Dependent Variables 1"
    t1: Time "Time-Dependent Solver 1"
      tlist = range(0,1,100)
      atolmethod = {comp1_T, global}
      atolvaluemethod = {comp1_T, factor}
      atol = {comp1_T, 1e-3}
      tstepsbdf = strict
      initialstepbdf = 1e-6
      maxorder = 2
      estrat = exclude
      fc1: FullyCoupled
        linsolver = d1
        damp = 0.9
        jtech = once
        stabacc = aacc
        aaccdim = 5
        aaccmix = 0.9
        aaccdelay = 1
      d1: Direct "Direct, heat transfer variables (ht)" | linsolver = pardiso; pivotperturb = 1.0E-13

Datasets
  dset1: Solution | solution = sol1

Plots
  pg1: PlotGroup3D "Temperature (ht)" | data = dset1
    surf1: Surface | expr = T
  pg2: PlotGroup3D "Isothermal Contours (ht)" | data = dset1
    iso1: Isosurface | expr = T; levelrounding = off
  pg3: PlotGroup1D "1D Plot Group 3" | data = dset1
    lngr1: LineGraph on edges 8 | expr = T; xdata = expr; xdataexpr = x
  pg4: PlotGroup1D "1D Plot Group 4" | data = dset1
    lngr1: LineGraph on edges 8 | expr = ht.ux; descr = Velocity field, x component; xdata = expr; xdataexpr = x