// COMSOL Multiphysics 6.0.0.312 model "blyat.mph"
// Outline of the model tree

Parameters
  H_model = 766.4[m]
  D_borehole = 0.15[m]
  L_borehole = 200[m]
  borehole_spacing = 500[m]
  T_surface = 13.2[degC]
  q_geothermal = 0.0938[W/m^2]
  E_annual = 30[MWh]
  A_wall = pi*D_borehole*L_borehole
  h_quaternary_layer = 15.3[m]
  k_eff_quaternary_layer = 2.28[W/(m*K)]
  Cp_eff_quaternary_layer = 2258.85[J/(kg*K)]
  rho_eff_quaternary_layer = 1560.0[kg/m^3]
  k_fluid_quaternary_layer = 0.6[W/(m*K)]
  Cp_fluid_quaternary_layer = 4186[J/(kg*K)]
  rho_fluid_quaternary_layer = 1000[kg/m^3]
  k_solid_quaternary_layer = 3.0[W/(m*K)]
  Cp_solid_quaternary_layer = 1800[J/(kg*K)]
  rho_solid_quaternary_layer = 1800[kg/m^3]
  eps_quaternary_layer = 0.3[1]
  v_quaternary_layer = 0.00005[m/s]
  h_lower_oligocene_layer = 507.7[m]
  k_eff_lower_oligocene_layer = 1.455[W/(m*K)]
  Cp_eff_lower_oligocene_layer = 2153.49[J/(kg*K)]
  rho_eff_lower_oligocene_layer = 1950.0[kg/m^3]
  k_fluid_lower_oligocene_layer = 0.6[W/(m*K)]
  Cp_fluid_lower_oligocene_layer = 4186[J/(kg*K)]
  rho_fluid_lower_oligocene_layer = 1000[kg/m^3]
  k_solid_lower_oligocene_layer = 1.5[W/(m*K)]
  Cp_solid_lower_oligocene_layer = 2100[J/(kg*K)]
  rho_solid_lower_oligocene_layer = 2000[kg/m^3]
  eps_lower_oligocene_layer = 0.05[1]
  v_lower_oligocene_layer = 0.000001[m/s]
  h_eocene_layer = 110.0[m]
  k_eff_eocene_layer = 1.79[W/(m*K)]
  Cp_eff_eocene_layer = 1099.38[J/(kg*K)]
  rho_eff_eocene_layer = 1935.0[kg/m^3]
  k_fluid_eocene_layer = 0.6[W/(m*K)]
  Cp_fluid_eocene_layer = 4186[J/(kg*K)]
  rho_fluid_eocene_layer = 1000[kg/m^3]
  k_solid_eocene_layer = 2.0[W/(m*K)]
  Cp_solid_eocene_layer = 840[J/(kg*K)]
  rho_solid_eocene_layer = 2100[kg/m^3]
  eps_eocene_layer = 0.15[1]
  v_eocene_layer = 0.00001[m/s]
  h_triassic_layer = 133.4[m]
  k_eff_triassic_layer = 2.215[W/(m*K)]
  Cp_eff_triassic_layer = 1054.66[J/(kg*K)]
  rho_eff_triassic_layer = 2445.0[kg/m^3]
  k_fluid_triassic_layer = 0.6[W/(m*K)]
  Cp_fluid_triassic_layer = 4186[J/(kg*K)]
  rho_fluid_triassic_layer = 1000[kg/m^3]
  k_solid_triassic_layer = 2.5[W/(m*K)]
  Cp_solid_triassic_layer = 850[J/(kg*K)]
  rho_solid_triassic_layer = 2700[kg/m^3]
  eps_triassic_layer = 0.15[1]
  v_triassic_layer = 0.0000[m/s]

Functions
  pw1: Piecewise
    funcname = T_initial
    arg = z
    extrap = interior
    pieces = 
      {0-h_quaternary_layer, 0, T_surface-q_geothermal/k_eff_quaternary_layer*z}
      {0-h_quaternary_layer-h_lower_oligocene_layer, 0-h_quaternary_layer, T_surface+q_geothermal/k_eff_quaternary_layer*h_quaternary_layer-q_geothermal/k_eff_lower_oligocene_layer*(z+h_quaternary_layer)}
      {0-h_quaternary_layer-h_lower_oligocene_layer-h_eocene_layer, 0-h_quaternary_layer-h_lower_oligocene_layer, T_surface+q_geothermal/k_eff_quaternary_layer*h_quaternary_layer+q_geothermal/k_eff_lower_oligocene_layer*h_lower_oligocene_layer-q_geothermal/k_eff_eocene_layer*(z+h_quaternary_layer+h_lower_oligocene_layer)}
      {0-h_quaternary_layer-h_lower_oligocene_layer-h_eocene_layer-h_triassic_layer, 0-h_quaternary_layer-h_lower_oligocene_layer-h_eocene_layer, T_surface+q_geothermal/k_eff_quaternary_layer*h_quaternary_layer+q_geothermal/k_eff_lower_oligocene_layer*h_lower_oligocene_layer+q_geothermal/k_eff_eocene_layer*h_eocene_layer-q_geothermal/k_eff_triassic_layer*(z+h_quaternary_layer+h_lower_oligocene_layer+h_eocene_layer)}
    argunit = m
    fununit = K
  pw2: Piecewise
    funcname = monthly_fractions
    arg = t
    extrap = periodic
    pieces = 
      {0/12, 1/12, 0.194717}
      {1/12, 2/12, 0.17216}
      {2/12, 3/12, 0.128944}
      {3/12, 4/12, 0.075402}
      {4/12, 5/12, 0.024336}
      {5/12, 6/12, 0}
      {6/12, 7/12, 0}
      {7/12, 8/12, 0}
      {8/12, 9/12, 0.025227}
      {9/12, 10/12, 0.076465}
      {10/12, 11/12, 0.129925}
      {11/12, 12/12, 0.172824}
    argunit = a
    fununit = 1

Variables
  var1 "Variables 1"
    T_min = borehole_wall_minimum(T)
    T_ave = borehole_wall_average(T)
    Q_extraction = (E_annual*monthly_fractions(t))/(1[a]/12)

Selections
  ground_surface_selection: Box "Ground Surface Selection" | entitydim = 2; zmin = 0; zmax = 0; condition = allvertices
  geothermal_boundary_selection: Box "Bottom Boundary Selection"
    entitydim = 2
    zmin = -766.4
    zmax = -766.4
    condition = allvertices
  sweep_domains_selection: Box "Sweep Domains Selection"
    entitydim = 3
    zmin = -L_borehole
    zmax = 0
    condition = allvertices
  borehole_wall_selection: Cylinder "Borehole Wall Selection"
    entitydim = 2
    r = 0.5*D_borehole
    top = 0
    bottom = -L_borehole
    condition = allvertices
  borehole_edge_selection: Cylinder "Borehole Edge Selection"
    entitydim = 1
    r = 1[mm]
    top = 0
    bottom = -L_borehole
    pos = {0, -0.5*D_borehole, 0}
    condition = allvertices
  collar_edge_selection: Cylinder "Collar Edge Selection"
    entitydim = 1
    r = 0.5*D_borehole
    top = 0
    bottom = 0
    condition = allvertices
  quaternary_layer_selection: Box "Quaternary Layer Selection"
    entitydim = 3
    zmin = -15.3
    zmax = 0.0
    condition = allvertices
  lower_oligocene_layer_selection: Box "Lower Oligocene Layer Selection"
    entitydim = 3
    zmin = -523.0
    zmax = -15.3
    condition = allvertices
  eocene_layer_selection: Box "Eocene Layer Selection"
    entitydim = 3
    zmin = -633.0
    zmax = -523.0
    condition = allvertices
  triassic_layer_selection: Box "Triassic Layer Selection"
    entitydim = 3
    zmin = -766.4
    zmax = -633.0
    condition = allvertices
  left_boundary_selection: Box "Left Boundary Selection"
    entitydim = 2
    xmin = -0.5*borehole_spacing
    xmax = -0.5*borehole_spacing
    condition = allvertices
  right_boundary_selection: Box "Right Boundary Selection"
    entitydim = 2
    xmin = 0.5*borehole_spacing
    xmax = 0.5*borehole_spacing
    condition = allvertices
  left_and_right_boundaries_selection: Union "Left and Right Bondaries Selection"
    entitydim = 2
    input = {left_boundary_selection, right_boundary_selection}

Couplings
  borehole_wall_integration: Integration "Borehole Wall Integration" on selection borehole_wall_selection
  borehole_wall_minimum: Minimum "Borehole Wall Minimum" on selection borehole_wall_selection
  borehole_wall_average: Average "Borehole Wall Average" on selection borehole_wall_selection

Geometry
  geom1 "Geometry 1" (3D, length unit m)
    layer1: Block "Quaternary Layer"
      pos = {-0.5*borehole_spacing, -0.5*borehole_spacing, -15.3}
      size = {borehole_spacing, 0.5*borehole_spacing, 15.3}
    layer2: Block "Upper Part of Lower Oligocene Layer"
      pos = {-0.5*borehole_spacing, -0.5*borehole_spacing, -200}
      size = {borehole_spacing, 0.5*borehole_spacing, 184.7}
    layer3: Block "Lower Part of Lower Oligocene Layer"
      pos = {-0.5*borehole_spacing, -0.5*borehole_spacing, -523.0}
      size = {borehole_spacing, 0.5*borehole_spacing, 323.0}
    layer4: Block "Eocene Layer"
      pos = {-0.5*borehole_spacing, -0.5*borehole_spacing, -633.0}
      size = {borehole_spacing, 0.5*borehole_spacing, 110.0}
    layer5: Block "Triassic Layer"
      pos = {-0.5*borehole_spacing, -0.5*borehole_spacing, -766.4}
      size = {borehole_spacing, 0.5*borehole_spacing, 133.4}
    borehole_cylinder: Cylinder "Borehole Cylinder" | pos = {0, 0, -L_borehole}; r = 0.5*D_borehole; h = L_borehole
    dif1: Difference | input = layer1, layer2, layer3, layer4, layer5; input2 = borehole_cylinder
    fin: Finalize "Form Union"

Physics
  ht: PorousMediaHeatTransfer "Heat Transfer in Porous Media" on all domains
    dependent variable T
    ShapeProperty.order_temperature = 1
    porous1: PorousMediumHeatTransferModel "Porous Medium 1" (default)
      fluid1: FluidPorousMediumHeatTransferModel "Fluid 1" (default) | u = {0, 0, 0}
      pm1: PorousMatrixPorousMediumHeatTransferModel "Porous Matrix 1" (default)
        solid = dommat
        porousMatrixPropertiesType = dryBulkProperties
        pref = 1[atm]
    init1: init "Initial Values 1" (default) | Tinit = T_initial(z)
    ins1: ThermalInsulation (default)
    porous2: PorousMediumHeatTransferModel "Quaternary Layer" on selection quaternary_layer_selection
      fluid1: FluidPorousMediumHeatTransferModel "Water" (default)
        k_mat = userdef
        k = k_fluid_quaternary_layer
        rho_mat = userdef
        rho = rho_fluid_quaternary_layer
        Cp_mat = userdef
        Cp = Cp_fluid_quaternary_layer
        u_src = userdef
        u = {v_quaternary_layer, 0, 0}
        gamma_mat = userdef
        gamma = 1
      pm1: PorousMatrixPorousMediumHeatTransferModel "Quaternary Layer" (default)
        porousMatrixPropertiesType = solidPhaseProperties
        poro_mat = userdef
        poro = eps_quaternary_layer
        k_sp_mat = userdef
        k_sp = k_solid_quaternary_layer
        rho_sp_mat = userdef
        rho_sp = rho_solid_quaternary_layer
        Cp_sp_mat = userdef
        Cp_sp = Cp_solid_quaternary_layer
    porous3: PorousMediumHeatTransferModel "Lower Oligocene Layer" on selection lower_oligocene_layer_selection
      fluid1: FluidPorousMediumHeatTransferModel "Water" (default)
        k_mat = userdef
        k = k_fluid_lower_oligocene_layer
        rho_mat = userdef
        rho = rho_fluid_lower_oligocene_layer
        Cp_mat = userdef
        Cp = Cp_fluid_lower_oligocene_layer
        u_src = userdef
        u = {v_lower_oligocene_layer, 0, 0}
        gamma_mat = userdef
        gamma = 1
      pm1: PorousMatrixPorousMediumHeatTransferModel "Lower Oligocene Layer" (default)
        porousMatrixPropertiesType = solidPhaseProperties
        poro_mat = userdef
        poro = eps_lower_oligocene_layer
        k_sp_mat = userdef
        k_sp = k_solid_lower_oligocene_layer
        rho_sp_mat = userdef
        rho_sp = rho_solid_lower_oligocene_layer
        Cp_sp_mat = userdef
        Cp_sp = Cp_solid_lower_oligocene_layer
    porous4: PorousMediumHeatTransferModel "Eocene Layer" on selection eocene_layer_selection
      fluid1: FluidPorousMediumHeatTransferModel "Water" (default)
        k_mat = userdef
        k = k_fluid_eocene_layer
        rho_mat = userdef
        rho = rho_fluid_eocene_layer
        Cp_mat = userdef
        Cp = Cp_fluid_eocene_layer
        u_src = userdef
        u = {v_eocene_layer, 0, 0}
        gamma_mat = userdef
        gamma = 1
      pm1: PorousMatrixPorousMediumHeatTransferModel "Eocene Layer" (default)
        porousMatrixPropertiesType = solidPhaseProperties
        poro_mat = userdef
        poro = eps_eocene_layer
        k_sp_mat = userdef
        k_sp = k_solid_eocene_layer
        rho_sp_mat = userdef
        rho_sp = rho_solid_eocene_layer
        Cp_sp_mat = userdef
        Cp_sp = Cp_solid_eocene_layer
    porous5: PorousMediumHeatTransferModel "Triassic Layer" on selection triassic_layer_selection
      fluid1: FluidPorousMediumHeatTransferModel "Water" (default)
        k_mat = userdef
        k = k_fluid_triassic_layer
        rho_mat = userdef
        rho = rho_fluid_triassic_layer
        Cp_mat = userdef
        Cp = Cp_fluid_triassic_layer
        u_src = userdef
        u = {v_triassic_layer, 0, 0}
        gamma_mat = userdef
        gamma = 1
      pm1: PorousMatrixPorousMediumHeatTransferModel "Triassic Layer" (default)
        porousMatrixPropertiesType = solidPhaseProperties
        poro_mat = userdef
        poro = eps_triassic_layer
        k_sp_mat = userdef
        k_sp = k_solid_triassic_layer
        rho_sp_mat = userdef
        rho_sp = rho_solid_triassic_layer
        Cp_sp_mat = userdef
        Cp_sp = Cp_solid_triassic_layer
    ground_surface_temperature: TemperatureBoundary "Ground Surface Temperature" on selection ground_surface_selection
      T0 = T_surface
    geothermal_heat_flux: HeatFluxBoundary "Geothermal Heat Flux" on selection geothermal_boundary_selection
      materialType = solid
      q0 = q_geothermal
    borehole_wall_heat_flux: HeatFluxBoundary "Borehole Wall Heat Flux" on selection borehole_wall_selection
      q0 = -Q_extraction/A_wall
    pc1: PeriodicHeat "Periodic Condition 1" on selection left_and_right_boundaries_selection
      destinationDomains: boundaries 29-33
      dd1: DestinationDomains "Destination Selection 1" on selection left_boundary_selection

Mesh
  mesh1 "Mesh 1"
    size: MeshSizeDefault | hmax = 76.6; hmin = 13.8; hcurve = 0.6; hnarrow = 0.5; hgrad = 1.5
    collar_edge: Edge "Collar Edge Mesh" on selection collar_edge_selection
      dis1: Distribution on edges 34, 39 | numelem = 10
    ground_surface_mesh: FreeTri "Ground Surface Mesh" on selection ground_surface_selection | method = del
      size1: Size on selection ground_surface_selection | hgrad = 1.2; custom = on
    swept_mesh: Sweep "Swept Mesh" on domains 1-5
      dis1: Distribution on selection quaternary_layer_selection
        type = predefined
        elemcount = 20
        elemratio = 10
        growthrate = exponential
        symmetric = on
      dis2: Distribution on domains 4
        type = predefined
        elemcount = 100
        elemratio = 10
        growthrate = exponential
        symmetric = on
      dis3: Distribution on domains 3
        type = predefined
        elemcount = 50
        elemratio = 10
        growthrate = exponential
        symmetric = on
      dis4: Distribution on domains 1, 2
        type = predefined
        elemcount = 20
        elemratio = 10
        growthrate = exponential
        symmetric = on
    tetrahedral_mesh: FreeTet "Free Tetrahedral" (disabled) on remaining entities
      size1: Size on entire geometry | hauto = 1; custom = on; hgrad = 1.1

Studies
  std1 "Study 1"
    time: Transient "Time Dependent" | tunit = a; tlist = {0, 50}; usertol = on; rtol = 1e-3

Solver configurations
  sol1 "Solution 1" (study std1)
    v1: Variables "Dependent Variables 1"
    t1: Time "Time-Dependent Solver 1"
      tunit = a
      tlist = {0, 50}
      tout = tsteps
      initialstepbdf = 1e-6
      maxorder = 2
      estrat = exclude
      d1: Direct | linsolver = pardiso

Datasets
  dset1: Solution | solution = sol1
  cpl1: CutPlane | data = dset1; quickplane = xz
  cln1: CutLine3D | data = dset1; genpoints = {{-200, -30, 0}, {-200, -30, -600}}

Plots
  pg1: PlotGroup2D "2D Plot Group 1" | data = cpl1
    surf1: Surface | expr = T-T_initial(z); unit = K
    con1: Contour | expr = T-T_initial(z)
  pg2: PlotGroup1D "1D Plot Group 2" | data = dset1
    lngr1: LineGraph on edges 35, 37 | expr = z; xdata = expr
  pg3: PlotGroup1D "1D Plot Group 3" | data = dset1
    glob1: Global | expr = {T_ave, T_min}; unit = {degC, degC}