// COMSOL Multiphysics 6.0.0.312 model "porous_media.mph"
// Outline of the model tree

Parameters
  H_model = 1000[m]
  D_borehole = 0.115[m]
  L_borehole = 300[m]
  borehole_spacing = 50[m]
  T_surface = 6.5[degC]
  q_geothermal = 0.065[W/m^2]
  E_annual = 30[MWh]
  A_wall = pi*D_borehole*L_borehole
  h_sand_layer = 100[m]
  k_sand_layer = 0.88[W/(m*K)]
  Cp_sand_layer = 1708.0[J/(kg*K)]
  rho_sand_layer = 1350.0[kg/m^3]
  Cf_sand_layer = 1000[kg/m^3]*4186[J/(kg*K)]
  v_sand_layer = 1e-4[m/s]
  h_granite_layer = 100[m]
  k_granite_layer = 3[W/(m*K)]
  Cp_granite_layer = 700[J/(kg*K)]
  rho_granite_layer = 2700[kg/m^3]
  h_sandstone_layer = 100[m]
  k_sandstone_layer = 2.215[W/(m*K)]
  Cp_sandstone_layer = 929.846[J/(kg*K)]
  rho_sandstone_layer = 2275.0[kg/m^3]
  Cf_sandstone_layer = 1000[kg/m^3]*4186[J/(kg*K)]
  v_sandstone_layer = 1e-5[m/s]
  h_gneiss_layer = 700[m]
  k_gneiss_layer = 4[W/(m*K)]
  Cp_gneiss_layer = 800[J/(kg*K)]
  rho_gneiss_layer = 2900[kg/m^3]

Functions
  pw1: Piecewise
    funcname = T_initial
    arg = z
    extrap = interior
    pieces = 
      {0-h_sand_layer, 0, T_surface-q_geothermal/k_sand_layer*z}
      {0-h_sand_layer-h_granite_layer, 0-h_sand_layer, T_surface+q_geothermal/k_sand_layer*h_sand_layer-q_geothermal/k_granite_layer*(z+h_sand_layer)}
      {0-h_sand_layer-h_granite_layer-h_sandstone_layer, 0-h_sand_layer-h_granite_layer, T_surface+q_geothermal/k_sand_layer*h_sand_layer+q_geothermal/k_granite_layer*h_granite_layer-q_geothermal/k_sandstone_layer*(z+h_sand_layer+h_granite_layer)}
      {0-h_sand_layer-h_granite_layer-h_sandstone_layer-h_gneiss_layer, 0-h_sand_layer-h_granite_layer-h_sandstone_layer, T_surface+q_geothermal/k_sand_layer*h_sand_layer+q_geothermal/k_granite_layer*h_granite_layer+q_geothermal/k_sandstone_layer*h_sandstone_layer-q_geothermal/k_gneiss_layer*(z+h_sand_layer+h_granite_layer+h_sandstone_layer)}
    argunit = m
    fununit = K

Variables
  var1 "Variables 1"
    T_min = borehole_wall_minimum(T)
    T_ave = borehole_wall_average(T)
    Q_wall = 4*borehole_wall_integration(ht.ndflux)
    Q_extraction = E_annual/1[a]

Selections
  ground_surface_selection: Box "Ground Surface Selection" | entitydim = 2; zmin = 0; zmax = 0; condition = allvertices
  geothermal_boundary_selection: Box "Bottom Boundary Selection"
    entitydim = 2
    zmin = -1000
    zmax = -1000
    condition = allvertices
  sweep_domains_selection: Box "Sweep Domains Selection"
    entitydim = 3
    zmin = -L_borehole
    zmax = 0
    condition = allvertices
  borehole_wall_selection: Cylinder "Borehole Wall Selection"
    entitydim = 2
    r = 0.5*D_borehole
    top = 0
    bottom = -L_borehole
    condition = allvertices
  borehole_edge_selection: Cylinder "Borehole Edge Selection"
    entitydim = 1
    r = 1[mm]
    top = 0
    bottom = -L_borehole
    pos = {0, -0.5*D_borehole, 0}
    condition = allvertices
  collar_edge_selection: Cylinder "Collar Edge Selection"
    entitydim = 1
    r = 0.5*D_borehole
    top = 0
    bottom = 0
    condition = allvertices
  sand_layer_selection: Box "Sand Layer Selection" | entitydim = 3; zmin = -100; zmax = 0; condition = allvertices
  granite_layer_selection: Box "Granite Layer Selection"
    entitydim = 3
    zmin = -200
    zmax = -100
    condition = allvertices
  sandstone_layer_selection: Box "Sandstone Layer Selection"
    entitydim = 3
    zmin = -300
    zmax = -200
    condition = allvertices
  gneiss_layer_selection: Box "Gneiss Layer Selection" | entitydim = 3; zmin = -1000; zmax = -300; condition = allvertices
  left_boundary_selection: Box "Left Boundary Selection"
    entitydim = 2
    xmin = -0.5*borehole_spacing
    xmax = -0.5*borehole_spacing
    condition = allvertices
  right_boundary_selection: Box "Right Boundary Selection"
    entitydim = 2
    xmin = 0.5*borehole_spacing
    xmax = 0.5*borehole_spacing
    condition = allvertices
  left_and_right_boundaries_selection: Union "Left and Right Bondaries Selection"
    entitydim = 2
    input = {left_boundary_selection, right_boundary_selection}

Couplings
  borehole_wall_integration: Integration "Borehole Wall Integration" on selection borehole_wall_selection
  borehole_wall_minimum: Minimum "Borehole Wall Minimum" on selection borehole_wall_selection
  borehole_wall_average: Average "Borehole Wall Average" on selection borehole_wall_selection

Geometry
  geom1 "Geometry 1" (3D, length unit m)
    layer1: Block "Sand Layer"
      pos = {-0.5*borehole_spacing, -0.5*borehole_spacing, -100}
      size = {borehole_spacing, 0.5*borehole_spacing, 100}
    layer2: Block "Granite Layer"
      pos = {-0.5*borehole_spacing, -0.5*borehole_spacing, -200}
      size = {borehole_spacing, 0.5*borehole_spacing, 100}
    layer3: Block "Sandstone Layer"
      pos = {-0.5*borehole_spacing, -0.5*borehole_spacing, -300}
      size = {borehole_spacing, 0.5*borehole_spacing, 100}
    layer4: Block "Gneiss Layer"
      pos = {-0.5*borehole_spacing, -0.5*borehole_spacing, -1000}
      size = {borehole_spacing, 0.5*borehole_spacing, 700}
    borehole_cylinder: Cylinder "Borehole Cylinder" | pos = {0, 0, -L_borehole}; r = 0.5*D_borehole; h = L_borehole
    dif1: Difference | input = layer1, layer2, layer3, layer4; input2 = borehole_cylinder
    fin: Finalize "Form Union"

Physics
  ht: PorousMediaHeatTransfer "Heat Transfer in Porous Media" on all domains
    dependent variable T
    porous1: PorousMediumHeatTransferModel "Sand Layer" (default)
      fluid1: FluidPorousMediumHeatTransferModel "Fluid 1" (default)
        k_mat = userdef
        k = 0.6
        rho_mat = userdef
        rho = 1000
        Cp_mat = userdef
        Cp = 4186
        gamma_not_IG_mat = userdef
        gamma_not_IG = 1
        u = {v_sand_layer, 0, 0}
      pm1: PorousMatrixPorousMediumHeatTransferModel "Porous Matrix 1" (default)
        porousMatrixPropertiesType = solidPhaseProperties
        poro_mat = userdef
        poro = 0.3
        k_sp_mat = userdef
        k_sp = 1
        rho_sp_mat = userdef
        rho_sp = 1500
        Cp_sp_mat = userdef
        Cp_sp = 1000
    init1: init "Initial Values 1" (default) | Tinit = T_initial(z)
    ins1: ThermalInsulation (default)
    temp1: TemperatureBoundary "Ground Surface Temperature" on selection ground_surface_selection | T0 = T_surface
    hf1: HeatFluxBoundary "Geothermal Heat Flux" on selection geothermal_boundary_selection | q0_input = q_geothermal
    hf2: HeatFluxBoundary "Borehole Wall Heat Flux" on selection borehole_wall_selection | q0_input = -Q_extraction/A_wall
    solid1: SolidHeatTransferModel "Granite Layer" on selection granite_layer_selection
      k_mat = userdef
      k = k_granite_layer
      rho_mat = userdef
      rho = rho_granite_layer
      Cp_mat = userdef
      Cp = Cp_granite_layer
    porous3: PorousMediumHeatTransferModel "Sandstone Layer" on selection sandstone_layer_selection
      fluid1: FluidPorousMediumHeatTransferModel "Fluid 1" (default)
        k_mat = userdef
        k = 0.6
        rho_mat = userdef
        rho = 1000
        Cp_mat = userdef
        Cp = 4186
        gamma_not_IG_mat = userdef
        gamma_not_IG = 1
        u = {v_sandstone_layer, 0, 0}
      pm1: PorousMatrixPorousMediumHeatTransferModel "Porous Matrix 1" (default)
        porousMatrixPropertiesType = solidPhaseProperties
        poro_mat = userdef
        poro = 0.15
        k_sp_mat = userdef
        k_sp = 2.5
        rho_sp_mat = userdef
        rho_sp = 2500
        Cp_sp_mat = userdef
        Cp_sp = 700
    solid2: SolidHeatTransferModel "Gneiss Layer" on selection gneiss_layer_selection
      k_mat = userdef
      k = k_gneiss_layer
      rho_mat = userdef
      rho = rho_gneiss_layer
      Cp_mat = userdef
      Cp = Cp_gneiss_layer
    pc1: PeriodicHeat "Periodic Condition 1" on selection left_and_right_boundaries_selection
      destinationDomains: boundaries 28-31
      dd1: DestinationDomains "Destination Selection 1" on selection right_boundary_selection

Mesh
  mesh1 "Mesh 1"
    size: MeshSizeDefault | hmax = 100; hmin = 18; hcurve = 0.6; hnarrow = 0.5; hgrad = 1.5
    collar_edge: Edge "Collar Edge Mesh" on selection collar_edge_selection
      dis1: Distribution on edges 31, 38 | numelem = 10
    ground_surface_mesh: FreeTri "Ground Surface Mesh" on selection ground_surface_selection | method = del
      size1: Size on selection ground_surface_selection | hgrad = 1.2; custom = on
    swept_mesh: Sweep "Swept Mesh" on selection sweep_domains_selection
      dis1: Distribution on domains 2-4
        type = predefined
        elemcount = 30
        elemratio = 10
        growthrate = exponential
        symmetric = on
    tetrahedral_mesh: FreeTet "Free Tetrahedral" on remaining entities
      size1: Size on entire geometry | hauto = 1; custom = on; hgrad = 1.1

Studies
  std1 "Study 1"
    time: Transient "Time Dependent" | tunit = a; tlist = range(0,1/12,50); usertol = on; rtol = 1e-3

Solver configurations
  sol1 "Solution 1" (study std1)
    v1: Variables "Dependent Variables 1"
    t1: Time "Time-Dependent Solver 1"
      tunit = a
      tlist = range(0,1/12,50)
      initialstepbdf = 1e-6
      maxorder = 2
      estrat = exclude
      d1: Direct | linsolver = pardiso

Datasets
  dset1: Solution | solution = sol1
  cpl1: CutPlane | data = dset1; quickplane = xz
  cln1: CutLine3D
    data = dset1
    genpoints = {{-borehole_spacing, 0, -0.5*h_sand_layer}, {borehole_spacing, 0, -0.5*h_sand_layer}}

Plots
  pg1: PlotGroup2D "2D Plot Group 1" | data = cpl1
    surf1: Surface | expr = comp1.T; unit = degC
    con1: Contour | expr = T-T_initial(z)
  pg2: PlotGroup1D "1D Plot Group 2" | data = dset1; xlabel = Temperature (degC)
    lngr1: LineGraph on edges 32, 34, 36 | expr = z; xdata = expr
  pg4: PlotGroup1D "1D Plot Group 4" | data = cln1
    lngr1: LineGraph | expr = T; unit = degC; xdata = expr; xdataexpr = x